// SBML level 2 version 4

model OR()
  // OR

  // Compartments:
  compartment OR_gate = 1;

  // Species:
  substanceOnly species D1R in OR_gate = 0;  // substance in MWBUILTINPREFIX_pico_MWBUILTINUNIT_mole
  substanceOnly species D1L in OR_gate = 20; D1L is "D1L'";  // substance in MWBUILTINPREFIX_pico_MWBUILTINUNIT_mole
  substanceOnly species S2 in OR_gate = 20;  // substance in MWBUILTINPREFIX_pico_MWBUILTINUNIT_mole
  substanceOnly species D1_S2 in OR_gate = 0; D1_S2 is "D1'/S2";  // substance in MWBUILTINPREFIX_pico_MWBUILTINUNIT_mole
  substanceOnly species D1 in OR_gate = 0; D1 is "D1'";  // substance in MWBUILTINPREFIX_pico_MWBUILTINUNIT_mole
  species FAM in OR_gate = 0;
  substanceOnly species D3R in OR_gate = 0;  // substance in MWBUILTINPREFIX_pico_MWBUILTINUNIT_mole
  substanceOnly species D3 in OR_gate = 0; D3 is "D3'";  // substance in MWBUILTINPREFIX_pico_MWBUILTINUNIT_mole
  substanceOnly species D3L_IN2 in OR_gate = 20; D3L_IN2 is "D3L/IN2";  // substance in MWBUILTINPREFIX_pico_MWBUILTINUNIT_mole
  substanceOnly species D3_S2 in OR_gate = 0; D3_S2 is "D3'/S2";  // substance in MWBUILTINPREFIX_pico_MWBUILTINUNIT_mole

  // Reactions:
  KOR1: D1R + D1L => D1; KOR1_kf*D1R*D1L;
    KOR1_kf = 10 MWDERIVEDUNIT_1__picomole_second;
  KOR_PN1: D1 + S2 -> D1_S2; KOR_PN1_kf*D1*S2 - KOR_PN1_kr*D1_S2; KOR_PN1 is "KOR-PN1";
    KOR_PN1_kf = 1 MWDERIVEDUNIT_1__picomole_second; KOR_PN1_kr = 10 MWDERIVEDUNIT_1__second;
  KOR2: D1_S2 => FAM + D1; KOR2_kf*D1_S2;
    KOR2_kf = 1 MWDERIVEDUNIT_1__second;
  KOR3: D3R + D3L_IN2 => D3; KOR3_kf*D3R*D3L_IN2;
    KOR3_kf = 1 MWDERIVEDUNIT_1__picomole_second;
  KOR_PN2: D3 + S2 -> D3_S2; KOR_PN2_kf*D3*S2 - KOR_PN2_kr*D3_S2; KOR_PN2 is "KOR-PN2";
    KOR_PN2_kf = 1 MWDERIVEDUNIT_1__picomole_second; KOR_PN2_kr = 30 MWDERIVEDUNIT_1__second;
  KOR4: D3_S2 => FAM + D3; KOR4_kf*D3_S2;
    KOR4_kf = 1 MWDERIVEDUNIT_1__second;

  // Events:
  event_1: at (time >= 0.2): D1R = 20;
  event_2: at (time >= 0.2): D3R = 0;

  // Unit definitions:
  unit MWBUILTINPREFIX_pico_MWBUILTINUNIT_mole = 1e-12 mole; MWBUILTINPREFIX_pico_MWBUILTINUNIT_mole is "picomole";
  unit MWDERIVEDUNIT_1__picomole_second = 1e12 dimensionless / (mole * second); MWDERIVEDUNIT_1__picomole_second is "1/(picomole*second)";
  unit MWDERIVEDUNIT_1__second = dimensionless / second; MWDERIVEDUNIT_1__second is "1/second";
end
